*Heading
** Job name: UT_YXZ_M Model name: UT_YXZ_M
** Generated by: Abaqus/CAE 2024
*Preprint, echo=NO, model=NO, history=NO, contact=NO
**
** PARTS
**
*Part, name=UT_YXZ_M
*Node
      1,          1.5,   2.65904117,          0.5
      2,          1.5,   2.65904117,           0.
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*Element, type=C3D8R
  1,   63,  373,   23,    1,  701, 1906,  899,  118
  2,  373,  374,   24,   23, 1906, 1907,  900,  899
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*Nset, nset=_PickedSet14, internal, generate
    1,  3510,     1
*Elset, elset=_PickedSet14, internal, generate
    1,  2492,     1
** Section: Section-1
*Solid Section, elset=_PickedSet14, material=AISI316L
,
*End Part
**
**
** ASSEMBLY
**
*Assembly, name=Assembly
**
*Instance, name=UT_YXZ_M, part=UT_YXZ_M
*End Instance
**
*Nset, nset=DISP, instance=UT_YXZ_M
 9,
*Nset, nset=LOAD, instance=UT_YXZ_M
   1,   2,   3,   4,   5,   6
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*Elset, elset=LOAD, instance=UT_YXZ_M
   1,   2,   3,   4,   5,   6
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*Nset, nset=RF, instance=UT_YXZ_M
 9,
*Nset, nset=XSYM, instance=UT_YXZ_M
    6,    7,    8,    9,   10,   16
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*Elset, elset=XSYM, instance=UT_YXZ_M
  837,  838,  839,  840,  841,  842
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*Nset, nset=YSIM, instance=UT_YXZ_M
   15,   16,   17,   18,  211,  212
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*Elset, elset=YSIM, instance=UT_YXZ_M
  971,  972,  973,  976,  977,  978
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*Elset, elset=__PickedSurf66_S2, internal, instance=UT_YXZ_M, generate
 837,  912,    1
*Elset, elset=__PickedSurf66_S6, internal, instance=UT_YXZ_M, generate
   1,  909,    4
*Elset, elset=__PickedSurf66_S1, internal, instance=UT_YXZ_M, generate
  1,  76,   1
*Elset, elset=__PickedSurf66_S4, internal, instance=UT_YXZ_M, generate
   4,  912,    4
*Surface, type=ELEMENT, name=_PickedSurf66, internal
__PickedSurf66_S2, S2
__PickedSurf66_S6, S6
__PickedSurf66_S4, S4
__PickedSurf66_S1, S1
** Constraint: Constraint-1
*Coupling, constraint name=Constraint-1, ref node=RF, surface=_PickedSurf66
*Kinematic
*End Assembly
**
** MATERIALS
**
*Material, name=AISI316L
*Elastic
150000., 0.33
*Plastic
 333.899,          0.
  338.08, 0.000208993
  349.77, 0.000945214
 364.344,  0.00228514
 377.434,  0.00427492
 387.705,  0.00694894
 395.798,    0.010335
 403.401,   0.0144566
 411.214,   0.0193342
 419.247,   0.0249858
 428.076,    0.031428
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 1363.98,          1.
** ----------------------------------------------------------------
**
** STEP: Step-1
**
*Step, name=Step-1, nlgeom=YES, inc=1000000
*Static
0.001, 1., 1e-08, 0.01
**
** BOUNDARY CONDITIONS
**
** Name: BC-3 Type: Displacement/Rotation
*Boundary
RF, 2, 2, 1.57755
** Name: BC-4 Type: Symmetry/Antisymmetry/Encastre
*Boundary
YSIM, YSYMM
** Name: BC-5 Type: Symmetry/Antisymmetry/Encastre
*Boundary
RF, YASYMM
** Name: BC-6 Type: Symmetry/Antisymmetry/Encastre
*Boundary
XSYM, XSYMM
**
** OUTPUT REQUESTS
**
*Restart, write, frequency=0
**
** FIELD OUTPUT: F-Output-1
**
*Output, field
*Node Output
RF, U
*Element Output, directions=YES
LE, MISES, PE, PEEQ, S, TRIAX
**
** HISTORY OUTPUT: H-Output-1
**
*Output, history
*Node Output, nset=LOAD
RF2,
*End Step
